a := -7
b := 7
c := 15
f(x) := x^3 + a*x^2 + b*x + c
A := 2
B := 4
ξ := 3
xn(n) :=
    B if n == 0
    (xn(n - 1) - f(xn(n - 1))/(f(xn(n - 1)) - f(A))*(xn(n - 1) - A)) otherwise
Δn(n) := |xn(n) - ξ|
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xn(1) = 3.28571
xn(2) = 3.04255
Δn(1) = 0.285714
Δn(2) = 0.0425532
xn(3) = 3.00495
xn(4) = 3.00055
Δn(3) = 0.00495375
Δn(4) = 0.000553449
xn(5) = 3.00006
xn(6) = 3.00001
Δn(5) = 6.15322e-5
Δn(6) = 6.83738e-6
fd(x) := d/dx(f(x))
fd(x) → 3*x^2 - 14*x + 7
xn(n) := xn(n - 1) - f(xn(n - 1))/fd(xn(n - 1))
Δn(n) := |f(xn(n))/fd(xn(n))|
xn(1) = -1
xn(2) = 2.96825
Δn(1) = 3.47278e-13
Δn(2) = 0.0315058
xn(3) = 2.99952
xn(4) = 2.99999
Δn(3) = 0.000482494
Δn(4) = 6.18065e-6
